<?xml version="1.0"?>
<?xml-stylesheet type="text/xsl" href="http://jsbsim.sourceforge.net/JSBSim.xsl"?>
<fdm_config xmlns:xsi="http://www.w3.org/2001/XMLSchema-instance" name="A350XWB-900-jsbsim" version="2.0" release="BETA" xsi:noNamespaceSchemaLocation="http://jsbsim.sourceforge.net/JSBSim.xsd">
  <!-- A321 WV011 -->
  <fileheader>
    <author> Bicyus (Jon Ortuondo) </author>
    <email> bicyus@gmail.com </email>
    <filecreationdate> 2012-03-09 </filecreationdate>
    <version> 0.01 </version>
    <description>Airbus A350XWB - 900</description>
    <note/>
    <limitation/>
  </fileheader>
  <metrics>
    <!-- lenght 66.61 m -->
    <wingarea unit="FT2">4652</wingarea>
    <wingspan unit="M">64.75</wingspan>
    <wing_incidence>0.5</wing_incidence> <!--Guestimate (Model inaccurate)-->
    <chord unit="M">7.38</chord>
    <htailarea unit="M2">70.92</htailarea>
    <htailarm unit="M">19.29</htailarm>
    <vtailarea unit="M2">49.64</vtailarea>
    <vtailarm unit="M">9.42</vtailarm>
    <!--
    <location name="AERORP" unit="IN">
      <x> 642.122 </x>
      <y> 0 </y>
      <z> -25.2091 </z>
    </location>
    <location name="EYEPOINT" unit="IN">
      <x> 80 </x>
      <y> -30 </y>
      <z> 70 </z>
    </location>
    -->
    <location name="VRP" unit="IN">
      <x> 0 </x>
      <y> 0 </y>
      <z> 0 </z>
    </location>
  </metrics>
  <mass_balance>
    <!--ixx unit="SLUG*FT2">    611903 </ixx>
	<iyy unit="SLUG*FT2">   1735389 </iyy>
	<izz unit="SLUG*FT2">   2301293 </izz-->
    <!--
___________________A320_________A330__________A340
BOW_____________178000________270000________283925
SPAN______________144___________198___________209
LENGTH____________153___________209___________209
ROLL MOI_________1725000______5727777_______10613448
PITCH MOI________2550000______19040141_______13904249
YAW MOI_________3950000______23089847_______24848934

	<ixx unit="SLUG*FT2">   2262183 </ixx>
	<iyy unit="SLUG*FT2">   3172439 </iyy>
	<izz unit="SLUG*FT2">   3337024 </izz>
-->
    <ixx unit="SLUG*FT2">1725000</ixx>
    <iyy unit="SLUG*FT2">2550000</iyy>
    <izz unit="SLUG*FT2">3950000</izz>
    <ixy unit="SLUG*FT2">         0 </ixy>
    <ixz unit="SLUG*FT2">         0 </ixz>
    <iyz unit="SLUG*FT2">         0 </iyz>
    <emptywt unit="LBS">239100</emptywt>
    <location name="CG" unit="IN">
      <x> 0 </x>
      <y> 0 </y>
      <z> 0 </z>
    </location>
    <pointmass name="Crew">
      <weight unit="LBS">400</weight>
      <location name="POINTMASS" unit="IN">
        <x>-1165.35</x>
        <y>0</y>
        <z>0</z>
      </location>
    </pointmass>
    <pointmass name="PAX">
      <weight unit="LBS">40000</weight>
      <form shape="cylinder">
        <radius unit="M"> 5.6 </radius>
        <length unit="M"> 40 </length>
      </form>
      <location name="POINTMASS" unit="IN">
        <x>-300</x>
        <y>0</y>
        <z>0</z>
      </location>
    </pointmass>
    <pointmass name="Fwd Cargo">
      <weight unit="LBS">7000</weight>
      <form shape="cylinder">
        <radius unit="M"> 3 </radius>
        <length unit="M"> 18 </length>
      </form>
      <location name="POINTMASS" unit="IN">
        <x>-800</x>
        <y>0</y>
        <z>0</z>
      </location>
    </pointmass>
    <pointmass name="Aft Cargo">
      <weight unit="LBS">0</weight>
      <form shape="cylinder">
        <radius unit="M"> 2 </radius>
        <length unit="M"> 5 </length>
      </form>
      <location name="POINTMASS" unit="IN">
        <x>638</x>
        <y>0</y>
        <z>0</z>
      </location>
    </pointmass>
    <pointmass name="Rear Bulk Cargo">
      <weight unit="LBS">0</weight>
      <form shape="cylinder">
        <radius unit="M"> 1.24 </radius>
        <length unit="M"> 2 </length>
      </form>
      <location name="POINTMASS" unit="IN">
        <x>874</x>
        <y>0</y>
        <z>0</z>
      </location>
    </pointmass>
    <pointmass name="Engine1">
      <weight unit="LBS">13000</weight>
      <form shape="cylinder">
        <radius unit="M"> 1.31 </radius>
        <length unit="M"> 5 </length>
      </form>
      <location name="POINTMASS" unit="IN">
        <x>-307</x>
        <y>-404</y>
        <z>54</z>
      </location>
    </pointmass>
    <pointmass name="Engine2">
      <weight unit="LBS">13000</weight>
      <form shape="cylinder">
        <radius unit="M"> 1.31 </radius>
        <length unit="M"> 5 </length>
      </form>
      <location name="POINTMASS" unit="IN">
        <x>-307</x>
        <y>404</y>
        <z>54</z>
      </location>
    </pointmass>
  </mass_balance>
  <ground_reactions>
    <contact type="BOGEY" name="NOSE_LG">
      <location unit="IN">
        <x> -1109.03 </x>
        <y> 0 </y>
        <z> -157.33 </z>
      </location>
      <static_friction> 0.5 </static_friction>
      <dynamic_friction> 0.5 </dynamic_friction>
      <rolling_friction> 0.02 </rolling_friction>
      <spring_coeff unit="LBS/FT"> 20000 </spring_coeff>
      <damping_coeff unit="LBS/FT/SEC"> 20000 </damping_coeff>
      <max_steer unit="DEG"> 70 </max_steer>
      <brake_group> NONE </brake_group>
      <retractable>1</retractable>
    </contact>
    <contact type="BOGEY" name="LEFT_MLG">
      <location unit="IN">
        <x> -11.42 </x>
        <y> -210.04 </y>
        <z> -157.87 </z>
      </location>
      <static_friction> 0.4 </static_friction>
      <dynamic_friction> 0.5 </dynamic_friction>
      <rolling_friction> 0.02 </rolling_friction>
      <spring_coeff unit="LBS/FT"> 100000 </spring_coeff>
      <damping_coeff unit="LBS/FT/SEC"> 100000 </damping_coeff>
      <max_steer unit="DEG"> 0.0 </max_steer>
      <brake_group> LEFT </brake_group>
      <retractable>1</retractable>
    </contact>
    <contact type="BOGEY" name="RIGHT_MLG">
      <location unit="IN">
        <x> -11.42 </x>
        <y> 210.04 </y>
        <z> -157.87 </z>
      </location>
      <static_friction> 0.4 </static_friction>
      <dynamic_friction> 0.5 </dynamic_friction>
      <rolling_friction> 0.02 </rolling_friction>
      <spring_coeff unit="LBS/FT"> 100000 </spring_coeff>
      <damping_coeff unit="LBS/FT/SEC"> 100000 </damping_coeff>
      <max_steer unit="DEG"> 0.0 </max_steer>
      <brake_group> RIGHT </brake_group>
      <retractable>1</retractable>
    </contact>
    <!--Nose tip (VRP)-->
    <contact type="STRUCTURE" name="NOSE_1">
      <location unit="IN">
        <x> -1291.33 </x>
        <y> 0 </y>
        <z> 0 </z>
      </location>
      <static_friction> 1.0 </static_friction>
      <dynamic_friction> 0.4 </dynamic_friction>
      <rolling_friction> 0.4 </rolling_friction>
      <spring_coeff unit="LBS/FT"> 100000 </spring_coeff>
      <damping_coeff unit="LBS/FT/SEC"> 50000 </damping_coeff>
      <max_steer unit="DEG"> 0.0 </max_steer>
      <brake_group> NONE </brake_group>
      <retractable>0</retractable>
    </contact>
    <!--Under the nose if front gear was down-->
    <contact type="STRUCTURE" name="NOSE_2">
      <location unit="IN">
        <x> -1138.98 </x>
        <y> 0 </y>
        <z> -56.69 </z>
      </location>
      <static_friction> 1.0 </static_friction>
      <dynamic_friction> 0.4 </dynamic_friction>
      <rolling_friction> 0.4 </rolling_friction>
      <spring_coeff unit="LBS/FT"> 100000 </spring_coeff>
      <damping_coeff unit="LBS/FT/SEC"> 50000 </damping_coeff>
      <max_steer unit="DEG"> 0.0 </max_steer>
      <brake_group> NONE </brake_group>
      <retractable>0</retractable>
    </contact>
    <!--Nose top-->
    <contact type="STRUCTURE" name="NOSE_3">
      <location unit="IN">
        <x> -986.61 </x>
        <y> 0 </y>
        <z> 176.77 </z>
      </location>
      <static_friction> 1.0 </static_friction>
      <dynamic_friction> 0.4 </dynamic_friction>
      <rolling_friction> 0.4 </rolling_friction>
      <spring_coeff unit="LBS/FT"> 100000 </spring_coeff>
      <damping_coeff unit="LBS/FT/SEC"> 50000 </damping_coeff>
      <max_steer unit="DEG"> 0.0 </max_steer>
      <brake_group> NONE </brake_group>
      <retractable>0</retractable>
    </contact>
    <!--Center Bottom (Belly fairing)-->
    <contact type="STRUCTURE" name="CENTER_1">
      <location unit="IN">
        <x> 0 </x>
        <y> 0 </y>
        <z> -81.10 </z>
      </location>
      <static_friction> 1.0 </static_friction>
      <dynamic_friction> 0.4 </dynamic_friction>
      <rolling_friction> 0.4 </rolling_friction>
      <spring_coeff unit="LBS/FT"> 100000 </spring_coeff>
      <damping_coeff unit="LBS/FT/SEC"> 50000 </damping_coeff>
      <max_steer unit="DEG"> 0.0 </max_steer>
      <brake_group> NONE </brake_group>
      <retractable>0</retractable>
    </contact>
    <!--Center Top-->
    <contact type="STRUCTURE" name="CENTER_2">
      <location unit="IN">
        <x> -79.53 </x>
        <y> 0 </y>
        <z> 179.92 </z>
      </location>
      <static_friction> 1.0 </static_friction>
      <dynamic_friction> 0.4 </dynamic_friction>
      <rolling_friction> 0.4 </rolling_friction>
      <spring_coeff unit="LBS/FT"> 100000 </spring_coeff>
      <damping_coeff unit="LBS/FT/SEC"> 50000 </damping_coeff>
      <max_steer unit="DEG"> 0.0 </max_steer>
      <brake_group> NONE </brake_group>
      <retractable>0</retractable>
    </contact>
    <contact type="STRUCTURE" name="ENG_1">
      <location unit="IN">
        <x>-320.08</x>
        <y>409.84</y>
        <z>-128.74</z>
      </location>
      <static_friction> 1.0 </static_friction>
      <dynamic_friction> 0.4 </dynamic_friction>
      <rolling_friction> 0.4 </rolling_friction>
      <spring_coeff unit="LBS/FT"> 100000 </spring_coeff>
      <damping_coeff unit="LBS/FT/SEC"> 50000 </damping_coeff>
      <max_steer unit="DEG"> 0.0 </max_steer>
      <brake_group> NONE </brake_group>
      <retractable>0</retractable>
    </contact>
    <contact type="STRUCTURE" name="ENG_2">
      <location unit="IN">
        <x>-320.08</x>
        <y>-409.84</y>
        <z>-128.74</z>
      </location>
      <static_friction> 1.0 </static_friction>
      <dynamic_friction> 0.4 </dynamic_friction>
      <rolling_friction> 0.4 </rolling_friction>
      <spring_coeff unit="LBS/FT"> 100000 </spring_coeff>
      <damping_coeff unit="LBS/FT/SEC"> 50000 </damping_coeff>
      <max_steer unit="DEG"> 0.0 </max_steer>
      <brake_group> NONE </brake_group>
      <retractable>0</retractable>
    </contact>
    <!--Normal tail strike position I guess-->
    <contact type="STRUCTURE" name="TAIL_1">
      <location unit="IN">
        <x> 740.55 </x>
        <y> 0 </y>
        <z> -31.21 </z>
      </location>
      <static_friction> 1.0 </static_friction>
      <dynamic_friction> 0.4 </dynamic_friction>
      <rolling_friction> 0.4 </rolling_friction>
      <spring_coeff unit="LBS/FT"> 100000 </spring_coeff>
      <damping_coeff unit="LBS/FT/SEC"> 50000 </damping_coeff>
      <max_steer unit="DEG"> 0.0 </max_steer>
      <brake_group> NONE </brake_group>
      <retractable>0</retractable>
    </contact>
    <!--Top of VSTAB-->
    <contact type="STRUCTURE" name="TAIL_2">
      <location unit="IN">
        <x> 1233.07 </x>
        <y> 0 </y>
        <z> 514.57 </z>
      </location>
      <static_friction> 1.0 </static_friction>
      <dynamic_friction> 0.4 </dynamic_friction>
      <rolling_friction> 0.4 </rolling_friction>
      <spring_coeff unit="LBS/FT"> 100000 </spring_coeff>
      <damping_coeff unit="LBS/FT/SEC"> 50000 </damping_coeff>
      <max_steer unit="DEG"> 0.0 </max_steer>
      <brake_group> NONE </brake_group>
      <retractable>0</retractable>
    </contact>
    <!--Left HSTAB-->
    <contact type="STRUCTURE" name="TAIL_3">
      <location unit="IN">
        <x> 1327.95 </x>
        <y> -371.65 </y>
        <z> 137.79 </z>
      </location>
      <static_friction> 1.0 </static_friction>
      <dynamic_friction> 0.4 </dynamic_friction>
      <rolling_friction> 0.4 </rolling_friction>
      <spring_coeff unit="LBS/FT"> 100000 </spring_coeff>
      <damping_coeff unit="LBS/FT/SEC"> 50000 </damping_coeff>
      <max_steer unit="DEG"> 0.0 </max_steer>
      <brake_group> NONE </brake_group>
      <retractable>0</retractable>
    </contact>
    <!--Right HSTAB-->
    <contact type="STRUCTURE" name="TAIL_4">
      <location unit="IN">
        <x> 1327.95 </x>
        <y> 371.65 </y>
        <z> 137.79 </z>
      </location>
      <static_friction> 1.0 </static_friction>
      <dynamic_friction> 0.4 </dynamic_friction>
      <rolling_friction> 0.4 </rolling_friction>
      <spring_coeff unit="LBS/FT"> 100000 </spring_coeff>
      <damping_coeff unit="LBS/FT/SEC"> 50000 </damping_coeff>
      <max_steer unit="DEG"> 0.0 </max_steer>
      <brake_group> NONE </brake_group>
      <retractable>0</retractable>
    </contact>
    <!--Left Wing-->
    <contact type="STRUCTURE" name="WING_TIP_1">
      <location unit="IN">
        <x> 394.09 </x>
        <y> -1153.94 </y>
        <z> 116.54 </z>
      </location>
      <static_friction> 1.0 </static_friction>
      <dynamic_friction> 0.4 </dynamic_friction>
      <rolling_friction> 0.4 </rolling_friction>
      <spring_coeff unit="LBS/FT"> 100000 </spring_coeff>
      <damping_coeff unit="LBS/FT/SEC"> 50000 </damping_coeff>
      <max_steer unit="DEG"> 0.0 </max_steer>
      <brake_group> NONE </brake_group>
      <retractable>0</retractable>
    </contact>
    <!--Left Wing tip-->
    <contact type="STRUCTURE" name="WING_TIP_2">
      <location unit="IN">
        <x> 534.25 </x>
        <y> -1274.41 </y>
        <z> 207.87 </z>
      </location>
      <static_friction> 1.0 </static_friction>
      <dynamic_friction> 0.4 </dynamic_friction>
      <rolling_friction> 0.4 </rolling_friction>
      <spring_coeff unit="LBS/FT"> 100000 </spring_coeff>
      <damping_coeff unit="LBS/FT/SEC"> 50000 </damping_coeff>
      <max_steer unit="DEG"> 0.0 </max_steer>
      <brake_group> NONE </brake_group>
      <retractable>0</retractable>
    </contact>
    <!--Right wing-->
    <contact type="STRUCTURE" name="WING_TIP_3">
      <location unit="IN">
        <x> 394.09 </x>
        <y> 1153.94 </y>
        <z> 116.54 </z>
      </location>
      <static_friction> 1.0 </static_friction>
      <dynamic_friction> 0.4 </dynamic_friction>
      <rolling_friction> 0.4 </rolling_friction>
      <spring_coeff unit="LBS/FT"> 100000 </spring_coeff>
      <damping_coeff unit="LBS/FT/SEC"> 50000 </damping_coeff>
      <max_steer unit="DEG"> 0.0 </max_steer>
      <brake_group> NONE </brake_group>
      <retractable>0</retractable>
    </contact>
    <!--Left Wing tip-->
    <contact type="STRUCTURE" name="WING_TIP_4">
      <location unit="IN">
        <x> 534.25 </x>
        <y> 1274.41 </y>
        <z> 207.87 </z>
      </location>
      <static_friction> 1.0 </static_friction>
      <dynamic_friction> 0.4 </dynamic_friction>
      <rolling_friction> 0.4 </rolling_friction>
      <spring_coeff unit="LBS/FT"> 100000 </spring_coeff>
      <damping_coeff unit="LBS/FT/SEC"> 50000 </damping_coeff>
      <max_steer unit="DEG"> 0.0 </max_steer>
      <brake_group> NONE </brake_group>
      <retractable>0</retractable>
    </contact>
  </ground_reactions>
  <propulsion>
    <engine file="trent_xwb_left">
      <location unit="IN">
        <x>-307</x>
        <y>-404</y>
        <z>54</z>
      </location>
      <orient unit="DEG">
        <roll> 0.0 </roll>
        <pitch> 2.2 </pitch>
        <yaw> 1 </yaw>
      </orient>
      <feed>5</feed>
      <thruster file="direct">
        <location unit="IN">
        <x>-307</x>
        <y>-404</y>
        <z>54</z>
        </location>
        <orient unit="DEG">
          <roll> 0.0 </roll>
          <pitch> 2.2 </pitch>
          <yaw> 1 </yaw>
        </orient>
      </thruster>
    </engine>
    <engine file="trent_xwb_right">
      <location unit="IN">
        <x>-307</x>
        <y>404</y>
        <z>54</z>
      </location>
      <orient unit="DEG">
        <roll> 0.0 </roll>
        <pitch> 2.2 </pitch>
        <yaw> -1 </yaw>
      </orient>
      <feed>6</feed>
      <thruster file="direct">
        <location unit="IN">
        <x>-307</x>
        <y>404</y>
        <z>54</z>
        </location>
        <orient unit="DEG">
          <roll> 0.0 </roll>
          <pitch> 2.2 </pitch>
          <yaw> -1 </yaw>
        </orient>
      </thruster>
    </engine>
    <tank type="FUEL">
      <!-- Left Tank (Wing tip Ventilation Surge) -->
      <location unit="IN">
        <x> 534 </x>
        <y> -1274 </y>
        <z> 207 </z>
      </location>
      <capacity unit="LBS"> 300 </capacity>
      <contents unit="LBS"> 0 </contents>
      <priority>0</priority>
      <type>JET-A1</type>
      <temperature>50</temperature>
    </tank>

    <tank type="FUEL">
      <!-- Left Tank (Inner) -->
      <location unit="IN">
        <x> -41 </x>
        <y> -333 </y>
        <z> 51 </z>
      </location>
      <capacity unit="LBS"> 52238 </capacity>
      <contents unit="LBS"> 30000 </contents>
      <standpipe unit="LBS">31</standpipe>
      <!-- minimun fuel on pipes -->
      <priority>3</priority>
      <type>JET-A1</type>
      <temperature>50</temperature>
    </tank>

    <tank type="FUEL">
      <!-- Center Tank -->
      <location unit="IN">
        <x> -183.46 </x>
        <y> 0 </y>
        <z> -59.05 </z>
      </location>
      <capacity unit="LBS"> 145366 </capacity>
      <contents unit="LBS"> 64000 </contents>
      <standpipe unit="LBS">43</standpipe>
      <!-- minimun fuel on pipes -->
      <priority>1</priority>
      <type>JET-A1</type>
      <temperature>50</temperature>
    </tank>

    <tank type="FUEL">
      <!-- Right Tank (Inner) -->
      <location unit="IN">
        <x> -41 </x>
        <y> 333 </y>
        <z> 51 </z>
      </location>
      <capacity unit="LBS"> 52238 </capacity>
      <contents unit="LBS"> 30000 </contents>
      <standpipe unit="LBS">31</standpipe>
      <!-- minimun fuel on pipes -->
      <priority>3</priority>
      <type>JET-A1</type>
      <temperature>50</temperature>
    </tank>

    <tank type="FUEL">
      <!-- Right Tank (Wing tip Ventilation Surge) -->
      <location unit="IN">
        <x> 534 </x>
        <y> 1274 </y>
        <z> 207 </z>
      </location>
      <capacity unit="LBS"> 300 </capacity>
      <contents unit="LBS"> 0 </contents>
      <priority>0</priority>
      <type>JET-A1</type>
      <temperature>50</temperature>
    </tank>
    <tank type="FUEL">
      <!-- LEFT FUEL PIPES (Engine 1 feed from this) -->
      <location unit="IN">
        <x> -320 </x>
        <y> -409 </y>
        <z> -128 </z>
      </location>
      <capacity unit="LBS"> 100 </capacity>
      <contents unit="LBS"> 100 </contents>
      <priority>1</priority>
      <type>JET-A1</type>
    </tank>
    <tank type="FUEL">
      <!-- RIGHT FUEL PIPES (Engine 2 feed from this) -->
      <location unit="IN">
        <x> -320 </x>
        <y> 409 </y>
        <z> -128 </z>
      </location>
      <capacity unit="LBS"> 100 </capacity>
      <contents unit="LBS"> 100 </contents>
      <priority>1</priority>
      <type>JET-A1</type>
    </tank>
  </propulsion>
  <!--<system file="A320-libraries" />
  <system file="A320-fbw" />-->
  <system file="fbw" />
  <!--<system file="A320-adr" />-->
  <system file="A350XWB-hydraulic" />
  <system file="A350XWB-apu" />
  <system file="A350XWB-air" />
	<system file="TriCycle_PushbackJSBSIM"/>
  <system file="A350XWB-fuel"/>
  <system file="A350XWB-engines" />
  <system file="A350XWB-electrical-ac" />
  <system file="A350XWB-electrical-dc" />
  <system file="A350XWB-pfd-computations" />
  <system file="A350XWB-vd" />
  <!--system file="pushback" /> -->
  <flight_control name="FCS: A350">
    <channel name="Pitch">
      <summer name="Pitch Trim Sum">
        <!--<input>fcs/elevator-cmd-norm</input>-->
        <input>/systems/fbw/elevator</input>
        <input>fcs/pitch-trim-cmd-norm</input>
        <clipto>
          <min>-1</min>
          <max>1</max>
        </clipto>
      </summer>
      <aerosurface_scale name="Elevator Control">
        <input>fcs/pitch-trim-sum</input>
        <gain>0.018</gain>
        <range>
          <min>-30</min>
          <max>15</max>
        </range>
        <output>fcs/elevator-pos-rad</output>
      </aerosurface_scale>
      <aerosurface_scale name="Elevator position normalized">
        <input>fcs/elevator-pos-deg</input>
        <domain>
          <min>-30</min>
          <max>15</max>
        </domain>
        <range>
          <min>-1</min>
          <max>1</max>
        </range>
        <output>fcs/elevator-pos-norm</output>
      </aerosurface_scale>
    </channel>
    <channel name="Roll">
      <summer name="Roll Trim Sum">
        <!--<input>fcs/aileron-cmd-norm</input>-->
        <input>/systems/fbw/aileron</input>
        <!--<input>/systems/fbw/</input>-->
        <clipto>
          <min>-1</min>
          <max>1</max>
        </clipto>
      </summer>
      <!--<summer name="Left Aileron Sum">
        <input>/systems/fbw/aileron</input>
        <input>/systems/fbw/symmetric-aileron</input>
        <output>fcs/left-aileron-sum</output>
        <clipto>
          <max>1</max>
          <min>-1</min>
        </clipto>
      </summer>-->
      <aerosurface_scale name="Left Aileron Control">
        <input>fcs/left-aileron-sum</input>
        <gain>/systems/hydraulic/both-gain</gain>
        <range>
          <min>-15</min>
          <max>15</max>
        </range>
        <output>fcs/left-aileron-pos-rad</output>
      </aerosurface_scale>
      <!--<summer name="Right Aileron Sum">
        <input>-/systems/fbw/aileron</input>
        <input>/systems/fbw/symmetric-aileron</input>
        <output>fcs/right-aileron-sum</output>
        <clipto>
          <max>1</max>
          <min>-1</min>
        </clipto>
      </summer>-->
      <aerosurface_scale name="Right Aileron Control">
        <input>fcs/right-aileron-sum</input>
        <gain>/systems/hydraulic/both-gain</gain>
        <range>
          <min>-15</min>
          <max>15</max>
        </range>
        <output>fcs/right-aileron-pos-rad</output>
      </aerosurface_scale>
      <aerosurface_scale name="Left Aileron position normalized">
        <input>fcs/left-aileron-pos-deg</input>
        <domain>
          <min>-17.18873385</min>
          <max>17.18873385</max>
        </domain>
        <range>
          <min>-1</min>
          <max>1</max>
        </range>
        <output>fcs/left-aileron-pos-norm</output>
      </aerosurface_scale>
      <aerosurface_scale name="Right Aileron position normalized">
        <input>fcs/right-aileron-pos-deg</input>
        <domain>
          <min>-17.18873385</min>
          <max>17.18873385</max>
        </domain>
        <range>
          <min>-1</min>
          <max>1</max>
        </range>
        <output>fcs/right-aileron-pos-norm</output>
      </aerosurface_scale>
    </channel>
    <channel name="Yaw">
      <summer name="Rudder Command Sum">
        <input>fcs/rudder-cmd-norm</input>
        <input>fcs/yaw-trim-cmd-norm</input>
        <clipto>
          <min> -0.35 </min>
          <max>  0.35 </max>
        </clipto>
      </summer>
      <scheduled_gain name="Yaw Damper Rate">
        <input>velocities/r-aero-rad_sec</input>
        <table>
          <independentVar lookup="row">velocities/ve-kts</independentVar>
          <tableData>
            30     0.00
            60     2.00
         </tableData>
        </table>
      </scheduled_gain>
      <scheduled_gain name="Yaw Damper Beta">
        <input>aero/beta-rad</input>
        <table>
          <independentVar lookup="row">velocities/ve-kts</independentVar>
          <tableData>
           30     0.00
           60     0.00
        </tableData>
        </table>
      </scheduled_gain>
      <summer name="Yaw Damper Sum">
        <input>fcs/yaw-damper-beta</input>
        <input>fcs/yaw-damper-rate</input>
        <clipto>
          <min> -0.1 </min>
          <max>  0.1 </max>
        </clipto>
      </summer>
      <scheduled_gain name="Yaw Damper Final">
        <input>fcs/yaw-damper-sum</input>
        <table>
          <independentVar lookup="row">velocities/ve-kts</independentVar>
          <tableData>
           30         0.0
           31         1.0
        </tableData>
        </table>
      </scheduled_gain>
      <summer name="Rudder Sum">
        <input>fcs/rudder-command-sum</input>
        <input>fcs/yaw-damper-final</input>
        <clipto>
          <min> -1 </min>
          <max>  1 </max>
        </clipto>
      </summer>
      <aerosurface_scale name="Rudder Control">
        <input>fcs/rudder-sum</input>
        <range>
          <min> -0.35 </min>
          <max>  0.35 </max>
        </range>
        <output>fcs/rudder-pos-rad</output>
      </aerosurface_scale>
      <aerosurface_scale name="rudder normalization">
        <input>fcs/rudder-pos-rad</input>
        <domain>
          <min> -0.35 </min>
          <max>  0.35 </max>
        </domain>
        <range>
          <min> -1 </min>
          <max>  1 </max>
        </range>
        <output>fcs/rudder-pos-norm</output>
      </aerosurface_scale>
    </channel>
    <channel name="Flaps">
      <kinematic name="Flaps Control">
        <input>fcs/flap-cmd-norm-actual</input>
        <traverse>
          <setting>
            <position>0</position>
            <time>0</time>
          </setting>
          <setting>
            <position>40</position>
            <time>40</time>
          </setting>
        </traverse>
        <output>fcs/flap-pos-deg</output>
      </kinematic>
      <aerosurface_scale name="Flap position normalized">
        <input>fcs/flap-pos-deg</input>
        <domain>
          <min>0</min>
          <max>40</max>
        </domain>
        <range>
          <min>0</min>
          <max>1</max>
        </range>
        <output>fcs/flap-pos-norm</output>
      </aerosurface_scale>
    </channel>
    <channel name="Slats">
      <kinematic name="Slat Control">
        <input>fcs/slat-cmd-norm</input>
        <traverse>
          <setting>
            <position>0</position>
            <time>0</time>
          </setting>
          <setting>
            <position>40</position>
            <time>40</time>
          </setting>
        </traverse>
        <output>fcs/slat-pos-deg</output>
      </kinematic>
      <aerosurface_scale name="Slat position normalized">
        <input>fcs/slat-pos-deg</input>
        <domain>
          <min>0</min>
          <max>40</max>
        </domain>
        <range>
          <min>0</min>
          <max>1</max>
        </range>
        <output>fcs/slat-pos-norm</output>
      </aerosurface_scale>
      <aerosurface_scale name="Slat position normalized">
        <input>fcs/slat-pos-deg</input>
        <domain>
          <min>0</min>
          <max>1</max>
        </domain>
        <range>
          <min>0</min>
          <max>1</max>
        </range>
        <output>surface-positions/slat-pos-norm</output>
      </aerosurface_scale>
    </channel>
    <channel name="Landing Gear">
      <kinematic name="Gear Control">
        <input>gear/gear-cmd-norm</input>
        <traverse>
          <setting>
            <position>0</position>
            <time>0</time>
          </setting>
          <setting>
            <position>1</position>
            <time>10</time>
          </setting>
        </traverse>
        <output>gear/gear-pos-norm</output>
      </kinematic>
    </channel>
    <channel name="Speedbrake">
      <kinematic name="Speedbrake">
        <input>fcs/speedbrake-cmd-norm</input>
        <traverse>
          <setting>
            <position>0</position>
            <time>0</time>
          </setting>
          <setting>
            <position>1</position>
            <time>2</time>
          </setting>
        </traverse>
        <output>fcs/speedbrake-pos-norm</output>
      </kinematic>
    </channel>
  </flight_control>
  <!-- copied from aeromatic on jsbsim website: https://jsbsim.sourceforge.net/aeromatic2.html-->
<aerodynamics>

  <axis name="LIFT">

    <function name="aero/force/Lift_alpha">
      <description>Lift due to alpha</description>
      <product>
          <property>aero/qbar-psf</property>
          <property>metrics/Sw-sqft</property>
          <table>
            <independentVar lookup="row">aero/alpha-deg</independentVar>
            <independentVar lookup="column">zero</independentVar> <!-- i needed SOMETHING for the column... defined in system-init.nas -->
            <!--<independentVar lookup="table">atmosphere/pressure-altitude</independentVar>-->
            <!--<tableData>
              -0.20 -0.680
               0.00  0.200
               0.23  1.200
               0.60  0.600
            </tableData>-->
            <!-- prolly stupid to use so many decimal places -->
            <tableData breakPoint="0">
                  0                    1
              -10 -0.68                0
              0   0.2                  0
              3   0.408600020986084    0
              4   0.460545741939042    0
              5   0.553820387898979    0
              15  1.32959915714663     0
              25  0.553820387898979    0
            </tableData>
            <tableData breakPoint="10000">
                  0                    1
              -10 -0.68                0
              0   0.2                  0
              5   0.553820387898979    0
              15  1.2861901197531      0
              25  0.553820387898979    0
            </tableData>
            <tableData breakPoint="20000">
                  0                    1
              -10 -0.68                0
              0   0.2                  0
              4   0.460059786218274    0
              14  1.18949755783144     0
              23  0.552045704143608    0
            </tableData>
            <tableData breakPoint="30000">
                  0                    1
              -10 -0.68                0
              0   0.2                  0
              3   0.377928305417668    0
              12  1.02336342939981     0
              19  0.552045704143608    0
            </tableData>
            <tableData breakPoint="40000">
                  0                    1
              -10 -0.68                0
              0   0.2                  0
              3   0.419559861853754    0
              10  0.867340883070804    0
              15  0.552045704143608    0
            </tableData>
          </table>
      </product>
    </function>
    <function name="aero/force/Lift_slat">
       <description>Delta Lift due to slats</description>
       <product>
           <property>aero/qbar-psf</property>
           <property>metrics/Sw-sqft</property>
           <table>
            <independentVar lookup="row">aero/alpha-deg</independentVar>
            <independentVar lookup="column">fcs/slat-pos-deg</independentVar>
            <tableData>
                 0  11.6    40
              0  0  0.0137  0.0337
              9  0  0.0537  0.0737
            </tableData>
           </table>
       </product>
    </function>
    <function name="aero/force/Lift_flap">
       <description>Delta Lift due to flaps</description>
       <product>
           <property>aero/qbar-psf</property>
           <property>metrics/Sw-sqft</property>
           <table>
            <independentVar lookup="row">aero/alpha-deg</independentVar>
            <independentVar lookup="column">fcs/flap-pos-deg</independentVar>
            <tableData>
                 0  11.6    23.84   25.8    40
              0  0  0.1     0.13    0.17    0.23
              5  0  0.3424  0.4334  0.5573  0.7304
            </tableData>
            </table>
       </product>
    </function>

    <function name="aero/force/Lift_speedbrake">
       <description>Delta Lift due to speedbrake</description>
       <product>
           <property>aero/qbar-psf</property>
           <property>metrics/Sw-sqft</property>
           <property>/systems/fbw/spoilers/fdm/symmetric-spoiler</property>
           <value>-0.1</value>
       </product>
    </function>

    <function name="aero/force/Lift_elevator">
       <description>Lift due to Elevator Deflection</description>
       <product>
           <property>aero/qbar-psf</property>
           <property>metrics/Sw-sqft</property>
           <property>fcs/elevator-pos-rad</property>
           <value>0.2</value>
       </product>
    </function>

  </axis>

  <axis name="DRAG">

    <function name="aero/force/Drag_basic">
       <description>Drag at zero lift</description>
       <product>
          <property>aero/qbar-psf</property>
          <property>metrics/Sw-sqft</property>
          <table>
            <independentVar lookup="row">aero/alpha-rad</independentVar>
            <tableData>
             -1.57    1.500
             -0.26    0.026
              0.00    0.020
              0.26    0.026
              1.57    1.500
            </tableData>
          </table>
       </product>
    </function>

    <function name="aero/force/Drag_induced">
       <description>Induced drag</description>
         <product>
           <property>aero/qbar-psf</property>
           <property>metrics/Sw-sqft</property>
           <property>aero/cl-squared</property>
           <value>0.043</value>
         </product>
    </function>

    <function name="aero/force/Drag_mach">
       <description>Drag due to mach</description>
        <product>
          <property>aero/qbar-psf</property>
          <property>metrics/Sw-sqft</property>
          <table>
            <independentVar lookup="row">velocities/mach</independentVar>
            <tableData>
                0.00      0.000
                0.79      0.000
                1.10      0.023
                1.80      0.015
            </tableData>
          </table>
        </product>
    </function>

    <function name="aero/force/Drag_flap">
       <description>Drag due to flaps</description>
         <product>
           <property>aero/qbar-psf</property>
           <property>metrics/Sw-sqft</property>
           <property>fcs/flap-pos-deg</property>
           <value> 0.00197 </value>
         </product>
    </function>

    <function name="aero/force/Drag_gear">
       <description>Drag due to gear</description>
         <product>
           <property>aero/qbar-psf</property>
           <property>metrics/Sw-sqft</property>
           <property>gear/gear-pos-norm</property>
           <value>0.015</value>
         </product>
    </function>

    <function name="aero/force/Drag_speedbrake">
       <description>Drag due to speedbrakes</description>
         <product>
           <property>aero/qbar-psf</property>
           <property>metrics/Sw-sqft</property>
           <property>/systems/fbw/spoilers/fdm/symmetric-spoiler</property>
           <value>0.02</value>
         </product>
    </function>

    <function name="aero/force/Drag_beta">
       <description>Drag due to sideslip</description>
       <product>
          <property>aero/qbar-psf</property>
          <property>metrics/Sw-sqft</property>
          <table>
            <independentVar lookup="row">aero/beta-rad</independentVar>
            <tableData>
              -1.57    1.230
              -0.26    0.050
               0.00    0.000
               0.26    0.050
               1.57    1.230
            </tableData>
          </table>
       </product>
    </function>

    <function name="aero/force/Drag_elevator">
       <description>Drag due to Elevator Deflection</description>
       <product>
           <property>aero/qbar-psf</property>
           <property>metrics/Sw-sqft</property>
           <abs><property>fcs/elevator-pos-norm</property></abs>
           <value>0.04</value>
       </product>
    </function>

  </axis>

  <axis name="SIDE">

    <function name="aero/force/Side_beta">
       <description>Side force due to beta</description>
       <product>
           <property>aero/qbar-psf</property>
           <property>metrics/Sw-sqft</property>
           <property>aero/beta-rad</property>
           <value>-1</value>
       </product>
    </function>

  </axis>

  <axis name="ROLL">

    <function name="aero/moment/Roll_beta">
       <description>Roll moment due to beta</description>
       <product>
           <property>aero/qbar-psf</property>
           <property>metrics/Sw-sqft</property>
           <property>metrics/bw-ft</property>
           <property>aero/beta-rad</property>
           <value>-0.1</value>
       </product>
    </function>

    <function name="aero/moment/Roll_damp">
       <description>Roll moment due to roll rate</description>
       <product>
           <property>aero/qbar-psf</property>
           <property>metrics/Sw-sqft</property>
           <property>metrics/bw-ft</property>
           <property>aero/bi2vel</property>
           <property>velocities/p-aero-rad_sec</property>
           <value>-0.4</value>
       </product>
    </function>

    <function name="aero/moment/Roll_yaw">
       <description>Roll moment due to yaw rate</description>
       <product>
           <property>aero/qbar-psf</property>
           <property>metrics/Sw-sqft</property>
           <property>metrics/bw-ft</property>
           <property>aero/bi2vel</property>
           <property>velocities/r-aero-rad_sec</property>
           <value>0.15</value>
       </product>
    </function>

    <function name="aero/moment/Roll_aileron">
       <description>Roll moment due to aileron</description>
       <product>
          <property>aero/qbar-psf</property>
          <property>metrics/Sw-sqft</property>
          <property>metrics/bw-ft</property>
          <property>/systems/fbw/fdm-aileron</property>
          <value>0.1</value>
       </product>
    </function>

    <function name="aero/moment/Roll_spoiler">
       <description>Roll moment due to asymmetric spoiler deflection</description>
       <product>
          <property>aero/qbar-psf</property>
          <property>metrics/Sw-sqft</property>
          <property>metrics/bw-ft</property>
          <property>/systems/fbw/spoilers/fdm/roll-spoiler</property>
          <value>0.02</value>
       </product>
    </function>

    <function name="aero/moment/Roll_rudder">
       <description>Roll moment due to rudder</description>
       <product>
           <property>aero/qbar-psf</property>
           <property>metrics/Sw-sqft</property>
           <property>metrics/bw-ft</property>
           <property>fcs/rudder-pos-rad</property>
           <value>0.01</value>
       </product>
    </function>

  </axis>

  <axis name="PITCH">

    <function name="aero/moment/Pitch_alpha">
       <description>Pitch moment due to alpha</description>
       <product>
           <property>aero/qbar-psf</property>
           <property>metrics/Sw-sqft</property>
           <property>metrics/cbarw-ft</property>
           <property>aero/alpha-rad</property>
           <value>-0.6</value>
       </product>
    </function>

    <function name="aero/moment/Pitch_elevator">
       <description>Pitch moment due to elevator</description>
       <product>
          <property>aero/qbar-psf</property>
          <property>metrics/Sw-sqft</property>
          <property>metrics/cbarw-ft</property>
          <property>fcs/elevator-pos-rad</property>
          <table>
            <independentVar lookup="row">velocities/mach</independentVar>
            <tableData>
              0.0     -1.200
              2.0     -0.300
            </tableData>
          </table>
       </product>
    </function>

    <function name="aero/moment/Pitch_damp">
       <description>Pitch moment due to pitch rate</description>
       <product>
           <property>aero/qbar-psf</property>
           <property>metrics/Sw-sqft</property>
           <property>metrics/cbarw-ft</property>
           <property>aero/ci2vel</property>
           <property>velocities/q-aero-rad_sec</property>
           <value>-17</value>
       </product>
    </function>

    <function name="aero/moment/Pitch_alphadot">
       <description>Pitch moment due to alpha rate</description>
       <product>
           <property>aero/qbar-psf</property>
           <property>metrics/Sw-sqft</property>
           <property>metrics/cbarw-ft</property>
           <property>aero/ci2vel</property>
           <property>aero/alphadot-rad_sec</property>
           <value>-6</value>
       </product>
    </function>

  </axis>

  <axis name="YAW">

    <function name="aero/moment/Yaw_beta">
       <description>Yaw moment due to beta</description>
       <product>
           <property>aero/qbar-psf</property>
           <property>metrics/Sw-sqft</property>
           <property>metrics/bw-ft</property>
           <property>aero/beta-rad</property>
           <value>0.12</value>
       </product>
    </function>

    <function name="aero/moment/Yaw_damp">
       <description>Yaw moment due to yaw rate</description>
       <product>
           <property>aero/qbar-psf</property>
           <property>metrics/Sw-sqft</property>
           <property>metrics/bw-ft</property>
           <property>aero/bi2vel</property>
           <property>velocities/r-aero-rad_sec</property>
           <value>-0.15</value>
       </product>
    </function>

    <function name="aero/moment/Yaw_rudder">
       <description>Yaw moment due to rudder</description>
       <product>
           <property>aero/qbar-psf</property>
           <property>metrics/Sw-sqft</property>
           <property>metrics/bw-ft</property>
           <property>fcs/rudder-pos-rad</property>
           <value>-0.1</value>
       </product>
    </function>

    <function name="aero/moment/Yaw_aileron">
       <description>Adverse yaw</description>
       <product>
           <property>aero/qbar-psf</property>
           <property>metrics/Sw-sqft</property>
           <property>metrics/bw-ft</property>
           <property>/systems/fbw/fdm-aileron</property>
           <value>0</value>
       </product>
    </function>

  </axis>

 </aerodynamics>


	<!-- JPACK: Force-point for Voodoomaster Pushback -->
	<external_reactions>
		<force name="pushback" frame="BODY">
			<location unit="IN">
				<x> -980.19 </x>
				<y>    0.00 </y>
				<z>  -65.00 </z>
			</location>
			<direction>
				<x>1</x>
				<y>0</y>
				<z>0</z>
			</direction>
		</force>
	</external_reactions>

</fdm_config>
