<?xml version="1.0"?>
<!-- modified version of cf6 engine from md11 -->
<!-- Copyright (c) 2024 Josh Davidson (Octal450) -->

<turbine_engine name="trent_xwb">

	<milthrust>84000</milthrust>
	<tsfc>0.478</tsfc>
	<bleed>0</bleed> <!-- Set by pneumatic system -->
	<ignitionn1>2.8</ignitionn1>
	<ignitionn2>29.4</ignitionn2>
	<n1spinup>0.091</n1spinup>
	<n2spinup>0.958</n2spinup>
	<n1spindown>9.5</n1spindown>
	<n2spindown>9.5</n2spindown>
	<n1startrate>0.578</n1startrate>
	<n2startrate>1.193</n2startrate>
	<idlen1>20.0</idlen1>
	<idlen2>60.0</idlen2>
	<maxn1>104.3</maxn1>
	<maxn2>102.6</maxn2>
	<augmented>0</augmented>
	<injected>0</injected>

	<function name="N1SpoolUp">
		<table>
			<independentVar lookup="row">propulsion/engine[1]/n1</independentVar>
			<tableData>
				 24   1.1
				 28   2.9
				 46   9.7
				 68  15.4
				 80  19.6
				 94  21.4
				103  23.6
			</tableData>
		</table>
	</function>

	<function name="N1SpoolDown">
		<table>
			<independentVar lookup="row">propulsion/engine[1]/n1</independentVar>
			<tableData>
				 24   1.1
				 28   2.9
				 46   9.7
				 68  15.4
				 80  19.6
				 94  21.4
				103  23.6
			</tableData>
		</table>
	</function>

	<function name="N2SpoolUp"> <!-- N1 to N2 factor 0.528784648187633 -->
		<table>
			<independentVar lookup="row">propulsion/engine[1]/n1</independentVar>
			<tableData>
				 24   0.6
				 28   1.5
				 46   5.1
				 68   8.1
				 80  10.4
				 94  11.3
				103  12.5
			</tableData>
		</table>
	</function>

	<function name="N2SpoolDown"> <!-- N1 to N2 factor 0.528784648187633 -->
		<table>
			<independentVar lookup="row">propulsion/engine[1]/n1</independentVar>
			<tableData>
				 24   0.6
				 28   1.5
				 46   5.1
				 68   8.1
				 80  10.4
				 94  11.3
				103  12.5
			</tableData>
		</table>
	</function>

	<function name="IdleThrust">
		<table>
			<independentVar lookup="row">velocities/mach</independentVar>
			<independentVar lookup="column">atmosphere/density-altitude</independentVar>
			<tableData>
				-10000     0     10000   20000   30000   40000   50000   60000
				0.0  0.0430  0.0488  0.0528  0.0694  0.0899  0.1183  0.1467  0
				0.2  0.0500  0.0501  0.0335  0.0544  0.0797  0.1049  0.1342  0
				0.4  0.0040  0.0047  0.0020  0.0272  0.0595  0.0891  0.1203  0
				0.6  0.0     0.0     0.0     0.0     0.0276  0.0718  0.1073  0
				0.8  0.0     0.0     0.0     0.0     0.0474  0.0868  0.0900  0
				1.0  0.0     0.0     0.0     0.0     0.0     0.0552  0.0800  0
			</tableData>
		</table>
	</function>

	<function name="MilThrust"> <!-- If you change this, make sure you update the table in the engine system file -->
		<product>
			<table>
				<independentVar lookup="row">velocities/mach</independentVar>
				<independentVar lookup="column">atmosphere/density-altitude</independentVar>
				<tableData>
					      -10000       0   10000   20000   30000   40000   50000   60000
					0.0   1.2600  1.0000  0.7400  0.5340  0.3720  0.2410  0.1490  0
					0.2   1.1710  0.9340  0.6970  0.5060  0.3550  0.2310  0.1430  0
					0.4   1.1500  0.9210  0.6920  0.5060  0.3570  0.2330  0.1450  0
					0.6   1.1810  0.9510  0.7210  0.5320  0.3780  0.2480  0.1540  0
					0.8   1.2580  1.0200  0.7820  0.5820  0.4170  0.2750  0.1700  0
					1.0   1.3690  1.1200  0.8710  0.6510  0.4750  0.3150  0.1950  0
					1.2   1.4850  1.2300  0.9750  0.7440  0.5450  0.3640  0.2250  0
					1.4   1.5941  1.3400  1.0860  0.8450  0.6280  0.4240  0.2630  0
				</tableData>
			</table>
			<!--<property>/systems/fadec/limit/rated-thrust-factor</property>-->
			<table> <!-- Thrust loss due to reverser angle -->
				<independentVar lookup="row">/surface-positions/reverser-norm</independentVar>
				<tableData>
					0.01  1.00
					1.00  0.65
				</tableData>
			</table>
		</product>
	</function>

</turbine_engine>
